** The electrical units are chosen so that the permittivity is unity.
**
** To interpret the simulated electric potential in volts for a real material:
**
**       real potential = simulated potential/sqrt(real permittivity)
**
** To interpret the simulated charge in coulombs for a real material:
**
**       real charge = simulated charge*sqrt(real permittivity)
**
** REDUCED INTEGRATION: In order to use reduced integration three
**     changes should be made:
**
**     1. The element type of the dummy mesh should be changed
**        from CPE4 to CPE4R.
**     2. In the Material Definition section of this input file,
**        the '*Hourglass Stiffness' command and subsequent line
**        should be uncommented.
**     3. In the UEL subroutine, nInt should be set to 1.
**
** Shuolun Wang, Nov, 2021
**
************************************************************************
**			PARAMETERS
************************************************************************
*Parameter
**
**
** diffusivity(micro^2/?)
Diff_u = 0.05*3.0e-2
Diff_v = 0.05*1.0e-2
**
** feeding rate and kill rate (1/?)
**
** Mitosis
F_const = 0.028
k_const = 0.062
**
** Solitons
***F_const = 0.03
***k_const = 0.06
**
** flower
***F_const = 0.055
***k_const = 0.062
**
** fingers
***F_const = 0.037
***k_const = 0.06
**
**
** Uskate
***F_const = 0.062
***k_const = 0.061
**
** Maze
***F_const = 0.029
***k_const = 0.057
**
**
** rate constant for ode (1/?)
ph = 10.0
** threshold
Tr = 0.1
**
**
** A rate constant to rescale time and space
gamma = 1.0
**gamma = 0.1
**
**
**
** strength constant for electric field coupling
** (micro^2 ?-1 mV-1)
sigma = 0.0
**
**
** permittivity of the brain tissue
permittivity = 1.0
**
**
** applied electric potential (millivolt)
potential_neg = -75.0
potential_pos =  75.0
**
** total simulation time (?)
time_total = 10000.0
dt_max = 50.0
**
** number of local SDV's (used in the solution proceedure)
nlSdv = 3
**
** number of global SDV's (used for plotting)
ngSdv = 3
**
**
************************************************************************
**			MODEL DEFINITION
************************************************************************
*Node
      1,   5.64517975,   1.75584447
      2,  -5.04995203,  -5.49179125
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*User Element,Nodes=4,Type=U1,Iproperties=2,Properties=9,Coordinates=2,Variables=12,Unsymm
1,2,11,12,13
**
*Element, type=U1
  1, 486,  19,  20, 487
  2, 478,  25,  26, 491
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*Nset, nset=pentagon-1_all, generate
    1,  9081,     1
*Elset, elset=pentagon-1_all, generate
    1,  8942,     1
*Nset, nset=pentagon-1_initialpt
    1,    2,    3,    4,   15,   16
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*Elset, elset=pentagon-1_initialpt
    1,    2,    3,    4,    5,    6
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** Make the dummy mesh, shares nodes with the real mesh,
**  allows visualization of the results, access to
**  hourglass controls, and access to mechanical,
**  traction-type boundary conditions
**
*Element, type=CPE4
10001,486,19,20,487
10002,478,25,26,491
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*Elset, elset=ElDummy, generate
10001,  18942,    1
**
** Make a dummy element which is not connected to anything with CPE4T
**  just so that we can have the coupled thermal-displacement
**
*Node
999996,  0.0, 0.0
999997,  .00001, 0.0
999998,  .00001, .00001
999999,  0.0, .00001
*Nset, nset=tempElement
999996,999997,999998,999999
*Element, Type=CPE4T
999999,999996,999997,999998,999999
*Elset,elset=tempElement
999999
**
**
**
**
************************************************************************
**			MATERIAL DEFINITION*Include, Input=parameter.inp
************************************************************************
**
** Material properties for the real material
**
*uel property,elset=pentagon-1_all
*******************************************************************
<Diff_u>,<Diff_v>,<F_const>,<k_const>,<ph>,<Tr>,<gamma>,<sigma>,
<permittivity>,<nlSdv>,<ngSdv>
*******************************************************************
**
** Dummy mesh material properties
**
*Solid section, elset=ElDummy, material=Material-1
***Hourglass stiffness
**<Ghour>
*Solid section, elset=tempElement, material=Material-2
**
*Material, name=Material-1
** The dummy mesh stiffness is very small
*User output variables
<ngSdv>
*Elastic
1.e-20
*Density
1.0
**
*Material, name=Material-2
*Elastic
1.e-20
*Conductivity
1.0
*Density
1.0
*Specific heat
1.0
**
************************************************************************
**			INITIAL CONDITIONS
************************************************************************
*Initial conditions, type=temperature
pentagon-1_all,  1.0,0.0,0.0
pentagon-1_initialpt, 0.5,0.25,0.0
*Initial Conditions, type=TEMPERATURE
tempElement, 0.0,0.0,0.0
************************************************************************
**			STEP DEFINITION
************************************************************************
*Step, name=HeatTransfer, nlgeom=YES, inc=50000, amplitude=step
*** *Coupled Temperature-displacement, steady state
*Coupled Temperature-displacement, deltmx=100.0
0.001, <time_total>, 1e-10, <dt_max>
*Controls, Parameters=Time Incrementation
,,,,,,,20,,,,,,
**
*Boundary
pentagon-1_all,1,6
tempElement,1,6
**
*Output, field
*node output, nset=pentagon-1_all
u,nt
*Element output, elset=ElDummy
le,uvarm
**
*End Step
************************************************************************
