*Heading
2D plane-strain, Neural Dendrite growth
**
** This input file is for the simulation of a 2D plane-strain,
**    bilayer beam, bending actuator.  It is to be used use UEL
**    subroutine, uel_dielectric_2D.for.
**
** UNITS:  Length - meters, Time - sec, Angle - radians,
**	   Force - Newtons, Stress - Newton/meter^2 = Pa,
**	   Mass - kilograms, Density - kg/meter^3, Energy - Joules
**
** The electrical units are chosen so that the permittivity is unity.
**
** To interpret the simulated electric potential in volts for a real material:
**
**       real potential = simulated potential/sqrt(real permittivity)
**
** To interpret the simulated charge in coulombs for a real material:
**
**       real charge = simulated charge*sqrt(real permittivity)
**
** REDUCED INTEGRATION: In order to use reduced integration three
**     changes should be made:
**
**     1. The element type of the dummy mesh should be changed
**        from CPE4 to CPE4R.
**     2. In the Material Definition section of this input file,
**        the '*Hourglass Stiffness' command and subsequent line
**        should be uncommented.
**     3. In the UEL subroutine, nInt should be set to 1.
**
** Shuolun Wang, Nov, 2021
**
************************************************************************
**			PARAMETERS
************************************************************************
*Parameter
**
**
** diffusivity
Diff_u = 4.0e-2
Diff_v = 1.0e-2
**
** feeding rate and kill rate
**
** Mitosis
***F_const = 0.028
***k_const = 0.062
**
** Solitons
***F_const = 0.03
***k_const = 0.06
**
** flower
***F_const = 0.055
***k_const = 0.062
**
** fingers
***F_const = 0.037
***k_const = 0.06
**
**
** play around
***F_const = 0.03
***k_const = 0.062
**
** verification
F_const = 0.028
k_const = 0.06
**
** rate constant for ode
ph = 10.0
** threshold
Tr = 0.1
**
**
** A rate constant to rescale time and space
gamma = 1.0
**
**
**
** strength constant for electric field coupling
sigma = 0.05
**
**
** permittivity of the brain tissue
permittivity = 1.0
**
**
** applied electric potential (volt)
potential_neg = -1.0
potential_pos =  1.0
**
** total simulation time
time_total = 5000.0
dt_max = 1.0
**
** number of local SDV's (used in the solution proceedure)
nlSdv = 3
**
** number of global SDV's (used for plotting)
ngSdv = 3
**
************************************************************************
**			MODEL DEFINITION
************************************************************************
*Node
      1,           1.,           1.,          50.
      2,           1.,           0.,          50.
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*Nset, nset=initialpt
1,
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*User Element,Nodes=8,Type=U3,Iproperties=2,Properties=9,Coordinates=3,Variables=24,Unsymm
1,2,3,11,12,13
*Element, type=U3
  1,  603,  604,  606,  605,    1,    2,    4,    3
  2,  605,  606,  608,  607,    3,    4,    6,    5
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*Nset, nset=bar-1_Left
   1,   2, 603, 604
*Elset, elset=bar-1_Left
 1,
*Nset, nset=bar-1_Right
  601,  602, 1203, 1204
*Elset, elset=bar-1_Right
 300,
*Nset, nset=bar-1_All, generate
    1,  1204,     1
*Elset, elset=bar-1_All, generate
   1,  300,    1
**
** Make the dummy mesh, shares nodes with the real mesh,
**  allows visualization of the results, access to
**  hourglass controls, and access to mechanical,
**  traction-type boundary conditions
**
*Element, type=C3D8
10001,603,604,606,605,1,2,4,3
10002,605,606,608,607,3,4,6,5
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*Elset, elset=ElDummy, generate
10001,  10300,    1
**
** Make a dummy element which is not connected to anything with CPE4T
**  just so that we can have the coupled thermal-displacement
**
*Node
999996,  0.0, 0.0
999997,  .00001, 0.0
999998,  .00001, .00001
999999,  0.0, .00001
*Nset, nset=tempElement
999996,999997,999998,999999
*Element, Type=CPE4T
999999,999996,999997,999998,999999
*Elset,elset=tempElement
999999
**
************************************************************************
**			MATERIAL DEFINITION*Include, Input=parameter.inp
************************************************************************
**
** Material properties for the real material
**
*uel property,elset=bar-1_All
*******************************************************************
<Diff_u>,<Diff_v>,<F_const>,<k_const>,<ph>,<Tr>,<gamma>,<sigma>,
<permittivity>,<nlSdv>,<ngSdv>
*******************************************************************
**
** Dummy mesh material properties
**
*Solid section, elset=ElDummy, material=Material-1
***Hourglass stiffness
**<Ghour>
*Solid section, elset=tempElement, material=Material-2
**
*Material, name=Material-1
** The dummy mesh stiffness is very small
*User output variables
<ngSdv>
*Elastic
1.e-20
*Density
1.0
**
*Material, name=Material-2
*Elastic
1.e-20
*Conductivity
1.0
*Density
1.0
*Specific heat
1.0
**
************************************************************************
**			INITIAL CONDITIONS
************************************************************************
*Initial conditions, type=temperature
bar-1_All,  1.0,0.0,0.0
initialpt, 0.5,0.25,0.0
*Initial Conditions, type=TEMPERATURE
tempElement, 0.0,0.0,0.0
************************************************************************
**			STEP DEFINITION
************************************************************************
*Step, name=HeatTransfer, nlgeom=YES, inc=50000, amplitude=step
*** *Coupled Temperature-displacement, steady state
*Coupled Temperature-displacement, deltmx=100.0
0.001, <time_total>, 1e-10, <dt_max>
*Controls, Parameters=Time Incrementation
,,,,,,,20,,,,,,
**
*Boundary
bar-1_All,1,6
tempElement,1,6
*Boundary
bar-1_Left,13,13,<potential_pos>
bar-1_Right,13,13,<potential_neg>
**
*Output, field
*node output, nset=bar-1_All
u,nt
*Element output, elset=ElDummy
le,uvarm
**
*End Step
************************************************************************
